# settings.inp - Dependencies reloaded every loop iteration

units           real
dimension       3
boundary        p p f
atom_style      full
comm_style      tiled
newton          off
bond_style      class2
angle_style     class2
dihedral_style  class2
improper_style  class2
pair_style      lj/class2/coul/long 12.0
special_bonds   lj/coul 0.0 0.0 1.0
pair_modify     mix sixthpower
kspace_style    pppm 1.0e-5
kspace_modify   slab 3.0
neighbor        2.0 bin
neigh_modify    every 1 delay 0 check yes one 10000 page 1000000
region          lower block INF INF INF INF -2 10 units box
group           lower region lower
group           solvent type 5 6 7 8
group           ions    type 7 8
group           water   type 5 6
group           mobile subtract all lower
group           substrate_atoms subtract mobile solvent
molecule        water_mol water.mol
