clear

units           real
dimension       3
boundary        p p f
atom_style      full
comm_style      brick
newton          off

bond_style      class2
angle_style     class2
dihedral_style  class2
improper_style  class2

pair_style      lj/class2/coul/long 12.0
special_bonds   lj/coul 0.0 0.0 1.0
pair_modify     mix sixthpower

kspace_style    pppm 1.0e-5
kspace_modify   slab 3.0

neighbor        2.0 bin
neigh_modify    every 1 delay 0 check yes one 10000 page 1000000

read_restart    system_equilibrated_{{ name }}_{{ seed }}.restart
newton          off
comm_style      brick
pair_modify     mix sixthpower
kspace_modify   slab 3.0

region          lower block INF INF INF INF -2 10 units box
group           lower region lower
group           solvent type 5 6 7 8
group           ions    type 7 8
group           water   type 5 6
group           mobile subtract all lower
molecule        water_mol water.mol

variable        smd_steps  equal round(120.0/v_v)
variable        print_freq equal round(v_smd_steps/1000)
variable        dump_freq  equal round(v_smd_steps/50)

fix             FREEZE lower setforce 0.0 0.0 0.0
velocity        lower set 0.0 0.0 0.0

group           excluded_types type 1 2 3 4 5 6 7 8
group           polymer subtract all excluded_types
region          pull_zone block INF INF INF INF 65.0 165.0 units box
group           atoms_in_zone region pull_zone
group           pull_layer intersect polymer atoms_in_zone
group           smd_mobile subtract mobile pull_layer
group           substrate_atoms type 1 2 3 4
group           gel_atoms subtract all substrate_atoms

fix             sNVT smd_mobile nvt temp 300.0 300.0 50.0
fix             sNVE pull_layer nve
#-
compute         pol_rg   polymer gyration
compute         T_layer  pull_layer temp
compute         E_pair_smd gel_atoms group/group substrate_atoms kspace no pair yes
group           interface subtract all water ions
compute         pe_atom_smd all pe/atom
compute         stress_smd all stress/atom NULL
compute         contacts_smd polymer coord/atom cutoff 3.5 group substrate_atoms
compute         water_smd polymer coord/atom cutoff 3.5 group water
variable        E_pair_smd_v  equal c_E_pair_smd
variable        E_int equal ebond+eangle+edihed+eimp
variable        rg_v     equal c_pol_rg
variable        t_loc      equal c_T_layer

compute  rdf_poly_glass polymer rdf 200 1 substrate_atoms &
    cutoff 12.0
fix rdf_out all ave/time 1000 10 10000 c_rdf_poly_glass[*] &
    file rdf_poly_glass_{{name}}_{{ seed }}_$i.txt mode vector

compute  rho_poly  polymer chunk/atom bin/1d z lower 0.5 units box
compute  rho_water water   chunk/atom bin/1d z lower 0.5 units box
compute  rho_ions  ions    chunk/atom bin/1d z lower 0.5 units box

fix dens_poly  polymer ave/chunk 1000 100 10000 rho_poly  density/number &
    file density_poly_{{name}}_{{ seed }}_$i.txt
fix dens_water water   ave/chunk 1000 100 10000 rho_water density/number &
    file density_water_{{name}}_{{ seed }}_$i.txt
fix dens_ions  ions    ave/chunk 1000 100 10000 rho_ions  density/number &
    file density_ions_{{name}}_{{ seed }}_$i.txt

compute T_smd_mobile smd_mobile temp
compute pol_msd_smd polymer msd
compute contacts_sum_smd polymer reduce sum c_contacts_smd
compute water_sum_smd polymer reduce sum c_water_smd
compute T_mobile      mobile temp

variable T_mob_v     equal c_T_mobile
variable T_smd_v     equal c_T_smd_mobile
variable msd_z_v     equal c_pol_msd_smd[3]
variable msd_xy_v    equal (c_pol_msd_smd[1] + c_pol_msd_smd[2])
variable wat_cnt_v   equal c_water_sum_smd
variable poly_z_v    equal xcm(polymer,z)
variable sub_z_v     equal xcm(substrate_atoms,z)
variable gap_z_v     equal v_poly_z_v - v_sub_z_v
variable tot_cnt_smd equal c_contacts_sum_smd


fix smd_{{ name }}_{{ seed }}_$i all print 100 &
  "$(step) $(time) $(temp) ${T_mob_v} ${T_smd_v} ${t_loc} &
   $(pe) $(ke) $(etotal) $(press) $(pxx) $(pyy) $(pzz) &
   $(evdwl) $(ecoul) $(elong) $(ebond) $(eangle) $(edihed) $(eimp) ${E_int} ${E_pair_smd_v} &
   ${tot_cnt_smd} ${wat_cnt_v} &
   ${poly_z_v} ${sub_z_v} ${gap_z_v} &
   ${rg_v} ${msd_xy_v} ${msd_z_v} &
   $(density)" &
  file metrics_smd_{{ name }}_{{ seed }}_$i.txt screen no &
  title "Step Time Temp Temp_mobile Temp_smd_mobile Temp_Local PotEng KinEng TotEng Press Pxx Pyy Pzz Evdwl Ecoul Elong Ebond Eangle Edihed Eimp E_Internal E_Interface_Pair N_Contacts N_Water Polymer_Z Substrate_Z Gap_Z Rg MSD_xy MSD_z Density"
dump            smd_dense_dump all custom 1000 trajectory_smd_{{ name }}_{{ seed }}_$i.lammpstrj.gz &
                id type x y z ix iy iz q vx vy vz fx fy fz c_pe_atom_smd &
                c_stress_smd[1] c_stress_smd[2] c_stress_smd[3] &
                c_stress_smd[4] c_stress_smd[5] c_stress_smd[6] &
                c_contacts_smd c_water_smd
#-
variable        z_start  equal xcm(pull_layer,z)
variable        z_target equal v_z_start+60.0

group2ndx index.ndx pull_layer lower

fix             pull all colvars none output colvars_{{ name }}_{{ seed }}_${i}

fix_modify      pull config """
indexFile index.ndx
colvarsTrajFrequency 100
colvar {
  name distZ
  distanceZ {
    main { indexGroup pull_layer }
    ref  { dummyAtom (0.0, 0.0, 0.0) }
    axis (0.0, 0.0, 1.0)
  }
  outputValue on
  outputVelocity on
  outputAppliedForce on
}

harmonic {
  name pulling
  colvars distZ
  centers ${z_start}
  targetCenters ${z_target}
  targetNumSteps ${smd_steps}
  forceConstant 12.0
  outputCenters on
  outputAccumulatedWork on
  outputEnergy on
}
"""

dump            smd_dump all custom ${dump_freq} trajectory_smd_{{ name }}_{{ seed }}_$i.lammpstrj.gz id type xu yu zu q
timestep        0.5
run             ${smd_steps}
